# OpenSim document version 30000
Model HYOID_Scaled:
  length_units: meters
  force_units: N
  gravity: 0 -9.80665 0
  credits:
    Jonathan Mortensen, University of Utah, Department of Mechanical Engineering
  publications:
    The inclusion of hyoid muscles improve moment generating capacity and dynamic simulations in musculoskeletal models of the head and neck, PLOS ONE, 2018
  BodySet:
    Body ground: mass=0 mass_center=(0 0 0) inertia_xx=0 inertia_yy=0 inertia_zz=0
    Body spine: mass=70 mass_center=(0 0 0) inertia_xx=1 inertia_yy=1 inertia_zz=1 meshes=tlspine.vtp
      CustomJoint spine: parent_body=ground location_in_parent=(0 0 0) location=(0 0 0)
        Coordinate gndpitch: motion_type=rotational default_value=7.35301e-11 range=(-3.141593 3.141593) clamped=true
            locked=true
        Coordinate gndroll: motion_type=rotational default_value=1.396685e-11 range=(-3.141593 3.141593) clamped=true
            locked=true
        Coordinate gndyaw: motion_type=rotational default_value=7.749897e-12 range=(-3.141593 3.141593) clamped=true
            locked=true
        Coordinate spine_tx: motion_type=translational default_value=-3.978722e-17 range=(-1 1) clamped=true
            locked=true
        Coordinate spine_ty: motion_type=translational default_value=8.445262e-17 range=(-1 1) clamped=true locked=true
        Coordinate spine_tz: motion_type=translational default_value=-7.306666e-19 range=(-1 1) clamped=true
            locked=true
        SpatialTransform:
          TransformAxis rotation1: coordinates=gndpitch axis=(0 0 1) LinearFunction(coefficients=1 0)
          TransformAxis rotation2: coordinates=gndroll axis=(1 0 0) LinearFunction(coefficients=1 0)
          TransformAxis rotation3: coordinates=gndyaw axis=(0 1 0) LinearFunction(coefficients=1 0)
          TransformAxis translation1: coordinates=spine_tx axis=(1 0 0) LinearFunction(coefficients=1 0)
          TransformAxis translation2: coordinates=spine_ty axis=(0 1 0) LinearFunction(coefficients=1 0)
          TransformAxis translation3: coordinates=spine_tz axis=(0 0 1) LinearFunction(coefficients=1 0)
    Body rscapula: mass=1 mass_center=(0 0 0) inertia_xx=1 inertia_yy=1 inertia_zz=0.5 meshes=rscapula.vtp
      WeldJoint rscapulajnt: parent_body=spine location_in_parent=(-0.0366 0.3623 0.1837)
          orientation_in_parent=(0.1745329 -0.296706 -0.1745329) location=(0 0 0)
    Body rclavicle: mass=1 mass_center=(0 0 0) inertia_xx=1 inertia_yy=1 inertia_zz=0.5 meshes=rclavicle.vtp
      WeldJoint rclaviclejnt: parent_body=spine location_in_parent=(-0.0118 0.3353 0.022)
          orientation_in_parent=(0 0.1396263 0) location=(0 0 0)
    Body lscapula: mass=1 mass_center=(0 0 0) inertia_xx=1 inertia_yy=1 inertia_zz=0.5 meshes=lscapula.vtp
      WeldJoint lscapulajnt: parent_body=spine location_in_parent=(-0.0366 0.3623 -0.1837)
          orientation_in_parent=(-0.1745329 0.296706 -0.1745329) location=(0 0 0)
    Body lclavicle: mass=1 mass_center=(0 0 0) inertia_xx=1 inertia_yy=1 inertia_zz=0.5 meshes=lclavicle.vtp
      WeldJoint lclaviclejnt: parent_body=spine location_in_parent=(-0.0118 0.3353 -0.022)
          orientation_in_parent=(0 -0.1396263 0) location=(0 0 0)
    Body ribcage: mass=1 mass_center=(0 0 0) inertia_xx=1 inertia_yy=1 inertia_zz=0.75 meshes=ribcage.vtp
      WeldJoint ribcagejnt: parent_body=spine location_in_parent=(0 0 0) location=(0 0 0)
    Body cerv7: mass=0.5840847 mass_center=(-0.0002 0.0071 0) inertia_xx=0.02 inertia_yy=0.08 inertia_zz=0.02
        meshes=rotatedcerv7.vtp
      CustomJoint auxt1jnt: parent_body=spine location_in_parent=(-0.0475 0.3613 0) location=(0.00684 -0.005655 0)
        Coordinate pitch2: motion_type=Coupled default_value=1.191952e-6 range=(-0.5759587 0.837758) clamped=true
        Coordinate roll2: motion_type=Coupled default_value=-7.417425e-34 range=(-0.5759587 0.5759587) clamped=true
        Coordinate yaw2: motion_type=Coupled default_value=-1.940732e-33 range=(-0.4712389 0.4712389) clamped=true
        SpatialTransform: axes_held_at_zero=(translation1 translation2 translation3)
          TransformAxis rotation1: coordinates=pitch2 axis=(0 0 1)
            SimmSpline: x=(-1.74533 1.74533) y=(-0.172788 0.172788)
          TransformAxis rotation2: coordinates=roll2 axis=(1 0 0)
            SimmSpline: x=(-1.74533 1.74533) y=(-0.136136 0.136136)
          TransformAxis rotation3: coordinates=yaw2 axis=(0 1 0)
            SimmSpline: x=(-1.74533 1.74533) y=(-0.109956 0.109956)
    Body cerv6: mass=0.5077489 mass_center=(0.0002 0.0064 0) inertia_xx=0.02 inertia_yy=0.08 inertia_zz=0.02
        meshes=cerv6.vtp
      CustomJoint aux7jnt: parent_body=cerv7 location_in_parent=(0.013256 0.01238 0) location=(0.009419 -0.004065 0)
        Coordinate aux7jnt_r3: motion_type=rotational default_value=2.228953e-7 range=(-99999.9 99999.9) clamped=false
        Coordinate aux7jnt_r1: motion_type=rotational default_value=0 range=(-99999.9 99999.9) clamped=false
        Coordinate aux7jnt_r2: motion_type=rotational default_value=0 range=(-99999.9 99999.9) clamped=false
        SpatialTransform: axes_held_at_zero=(translation1 translation2 translation3)
          TransformAxis rotation1: coordinates=aux7jnt_r3 axis=(0 0 1) LinearFunction(coefficients=1 0)
          TransformAxis rotation2: coordinates=aux7jnt_r1 axis=(1 0 0) LinearFunction(coefficients=1 0)
          TransformAxis rotation3: coordinates=aux7jnt_r2 axis=(0 1 0) LinearFunction(coefficients=1 0)
    Body cerv5: mass=0.4291 mass_center=(0.0001 0.0063 0) inertia_xx=0.02 inertia_yy=0.08 inertia_zz=0.02
        meshes=cerv5.vtp
      CustomJoint aux6jnt: parent_body=cerv6 location_in_parent=(0.00985 0.00975 0) location=(0.00567 -0.00815 0)
        Coordinate aux6jnt_r3: motion_type=rotational default_value=2.622291e-7 range=(-99999.9 99999.9) clamped=false
        Coordinate aux6jnt_r1: motion_type=rotational default_value=0 range=(-99999.9 99999.9) clamped=false
        Coordinate aux6jnt_r2: motion_type=rotational default_value=0 range=(-99999.9 99999.9) clamped=false
        SpatialTransform: axes_held_at_zero=(translation1 translation2 translation3)
          TransformAxis rotation1: coordinates=aux6jnt_r3 axis=(0 0 1) LinearFunction(coefficients=1 0)
          TransformAxis rotation2: coordinates=aux6jnt_r1 axis=(1 0 0) LinearFunction(coefficients=1 0)
          TransformAxis rotation3: coordinates=aux6jnt_r2 axis=(0 1 0) LinearFunction(coefficients=1 0)
    Body cerv4: mass=0.4233168 mass_center=(-0.0003 0.0067 0) inertia_xx=0.02 inertia_yy=0.08 inertia_zz=0.02
        meshes=cerv4.vtp
      CustomJoint aux5jnt: parent_body=cerv5 location_in_parent=(0.00843 0.00745 0) location=(0.00502 -0.01172 0)
        Coordinate aux5jnt_r3: motion_type=rotational default_value=2.622291e-7 range=(-99999.9 99999.9) clamped=false
        Coordinate aux5jnt_r1: motion_type=rotational default_value=0 range=(-99999.9 99999.9) clamped=false
        Coordinate aux5jnt_r2: motion_type=rotational default_value=0 range=(-99999.9 99999.9) clamped=false
        SpatialTransform: axes_held_at_zero=(translation1 translation2 translation3)
          TransformAxis rotation1: coordinates=aux5jnt_r3 axis=(0 0 1) LinearFunction(coefficients=1 0)
          TransformAxis rotation2: coordinates=aux5jnt_r1 axis=(1 0 0) LinearFunction(coefficients=1 0)
          TransformAxis rotation3: coordinates=aux5jnt_r2 axis=(0 1 0) LinearFunction(coefficients=1 0)
    Body cerv3: mass=0.419847 mass_center=(-0.0008 0.0071 0) inertia_xx=0.02 inertia_yy=0.08 inertia_zz=0.02
        meshes=cerv3.vtp
      CustomJoint aux4jnt: parent_body=cerv4 location_in_parent=(0.00732 0.00638 0) location=(0.00471 -0.00902 0)
        Coordinate aux4jnt_r3: motion_type=rotational default_value=1.966718e-7 range=(-99999.9 99999.9) clamped=false
        Coordinate aux4jnt_r1: motion_type=rotational default_value=0 range=(-99999.9 99999.9) clamped=false
        Coordinate aux4jnt_r2: motion_type=rotational default_value=0 range=(-99999.9 99999.9) clamped=false
        SpatialTransform: axes_held_at_zero=(translation1 translation2 translation3)
          TransformAxis rotation1: coordinates=aux4jnt_r3 axis=(0 0 1) LinearFunction(coefficients=1 0)
          TransformAxis rotation2: coordinates=aux4jnt_r1 axis=(1 0 0) LinearFunction(coefficients=1 0)
          TransformAxis rotation3: coordinates=aux4jnt_r2 axis=(0 1 0) LinearFunction(coefficients=1 0)
    Body cerv2: mass=0.5875545 mass_center=(-0.001 0.0059 0) inertia_xx=0.02 inertia_yy=0.08 inertia_zz=0.02
        meshes=cerv2.vtp
      CustomJoint aux3jnt: parent_body=cerv3 location_in_parent=(0.00525 0.00506 0) location=(0.00543 -0.01123 0)
        Coordinate aux3jnt_r3: motion_type=rotational default_value=1.311145e-7 range=(-99999.9 99999.9) clamped=false
        Coordinate aux3jnt_r1: motion_type=rotational default_value=0 range=(-99999.9 99999.9) clamped=false
        Coordinate aux3jnt_r2: motion_type=rotational default_value=0 range=(-99999.9 99999.9) clamped=false
        SpatialTransform: axes_held_at_zero=(translation1 translation2 translation3)
          TransformAxis rotation1: coordinates=aux3jnt_r3 axis=(0 0 1) LinearFunction(coefficients=1 0)
          TransformAxis rotation2: coordinates=aux3jnt_r1 axis=(1 0 0) LinearFunction(coefficients=1 0)
          TransformAxis rotation3: coordinates=aux3jnt_r2 axis=(0 1 0) LinearFunction(coefficients=1 0)
    Body cerv1: mass=0.4672677 mass_center=(0.0312 0.0019 0) inertia_xx=0.02 inertia_yy=0.08 inertia_zz=0.02
        meshes=cerv1.vtp
      CustomJoint aux2jnt: parent_body=cerv2 location_in_parent=(0.00689 0.02128 0) location=(0.04245 0.00352 0)
        Coordinate pitch1: motion_type=Coupled default_value=1.574161e-6 range=(-0.2792527 0.418879) clamped=true
        Coordinate roll1: motion_type=Coupled default_value=-1.889405e-33 range=(-0.1047198 0.1047198) clamped=true
        Coordinate yaw1: motion_type=Coupled default_value=1.274842e-34 range=(-0.6632251 0.6632251) clamped=true
        SpatialTransform: axes_held_at_zero=(translation1 translation2 translation3)
          TransformAxis rotation1: coordinates=pitch1 axis=(0 0 1)
            SimmSpline: x=(-1.74533 1.74533) y=(-0.774926 0.774926)
          TransformAxis rotation2: coordinates=roll1 axis=(1 0 0)
            SimmSpline: x=(-1.74533 1.74533) y=(-0.872665 0.872665)
          TransformAxis rotation3: coordinates=yaw1 axis=(0 1 0)
            SimmSpline: x=(-1.74533 1.74533) y=(-1.5516 1.5516)
    Body skull: mass=4.3 mass_center=(0.0173 0.063 0) inertia_xx=0.02073 inertia_yy=0.015 inertia_zz=0.022605
        meshes=skull.vtp
      CustomJoint aux1jnt: parent_body=cerv1 location_in_parent=(0.04335 0.01492 0) location=(0 0 0)
        Coordinate aux1jnt_r3: motion_type=rotational default_value=8.752333e-7 range=(-99999.9 99999.9) clamped=false
        Coordinate aux1jnt_r1: motion_type=rotational default_value=0 range=(-99999.9 99999.9) clamped=false
        Coordinate aux1jnt_r2: motion_type=rotational default_value=0 range=(-99999.9 99999.9) clamped=false
        SpatialTransform: axes_held_at_zero=(translation1 translation2 translation3)
          TransformAxis rotation1: coordinates=aux1jnt_r3 axis=(0 0 1) LinearFunction(coefficients=1 0)
          TransformAxis rotation2: coordinates=aux1jnt_r1 axis=(1 0 0) LinearFunction(coefficients=1 0)
          TransformAxis rotation3: coordinates=aux1jnt_r2 axis=(0 1 0) LinearFunction(coefficients=1 0)
    Body jaw: mass=0 mass_center=(0 0.05 0) inertia_xx=0 inertia_yy=0 inertia_zz=0 meshes=jaw.vtp
      WeldJoint jawjnt: parent_body=skull location_in_parent=(0 0 0) location=(0 0 0)
    Body r_eye: mass=0.0075 mass_center=(0 0 0) inertia_xx=4.32e-7 inertia_yy=4.32e-7 inertia_zz=4.32e-7
        meshes=(sclera.obj pupil.obj)
      CustomJoint Right_Eye_Joint: parent_body=skull location_in_parent=(0.077 0.051 0.034) location=(0 0 0)
        Coordinate r_eye_add_abd: motion_type=rotational default_value=0 range=(-0.698132 0.698132) clamped=false
        Coordinate r_eye_sup_inf: motion_type=rotational default_value=0 range=(-0.698132 0.698132) clamped=false
        Coordinate r_eye_inc_exc: motion_type=rotational default_value=0 range=(-0.174533 0.174533) clamped=false
        SpatialTransform: axes_held_at_zero=(translation1 translation2 translation3)
          TransformAxis rotation1: coordinates=r_eye_add_abd axis=(0 1 0) LinearFunction(coefficients=1 0)
          TransformAxis rotation2: coordinates=r_eye_sup_inf axis=(0 0 1) LinearFunction(coefficients=1 0)
          TransformAxis rotation3: coordinates=r_eye_inc_exc axis=(1 0 0) LinearFunction(coefficients=1 0)
      WrapEllipsoid right_eye_wrap: xyz_body_rotation=(0.7854 0 0) translation=(0 0 0) quadrant=all
          dimensions=(0.012 0.012 0.012)
      WrapEllipsoid right_eye_wrap2: translation=(0 0 0) quadrant=all dimensions=(0.012 0.012 0.012)
    Body l_eye: mass=0.0075 mass_center=(0 0 0) inertia_xx=4.32e-7 inertia_yy=4.32e-7 inertia_zz=4.32e-7
        meshes=(sclera.obj pupil.obj)
      CustomJoint Left_Eye_Joint: parent_body=skull location_in_parent=(0.077 0.051 -0.034) location=(0 0 0)
        Coordinate l_eye_add_abd: motion_type=rotational default_value=0 range=(-0.698132 0.698132) clamped=false
        Coordinate l_eye_sup_inf: motion_type=rotational default_value=0 range=(-0.698132 0.698132) clamped=false
        Coordinate l_eye_inc_exc: motion_type=rotational default_value=0 range=(-0.174533 0.174533) clamped=false
        SpatialTransform: axes_held_at_zero=(translation1 translation2 translation3)
          TransformAxis rotation1: coordinates=l_eye_add_abd axis=(0 1 0) LinearFunction(coefficients=1 0)
          TransformAxis rotation2: coordinates=l_eye_sup_inf axis=(0 0 1) LinearFunction(coefficients=1 0)
          TransformAxis rotation3: coordinates=l_eye_inc_exc axis=(1 0 0) LinearFunction(coefficients=1 0)
      WrapEllipsoid left_eye_wrap: xyz_body_rotation=(-0.7854 0 0) translation=(0 0 0) quadrant=all
          dimensions=(0.012 0.012 0.012)
      WrapEllipsoid left_eye_wrap2: translation=(0 0 0) quadrant=all dimensions=(0.012 0.012 0.012)
  ConstraintSet:
    CoordinateCouplerConstraint aux7jnt_r1_con: independent_coordinate_names=roll2 dependent_coordinate_name=aux7jnt_r1
      coupled_coordinates_function: SimmSpline: x=(-1.74533 1.74533) y=(-0.23911 0.23911)
    CoordinateCouplerConstraint aux7jnt_r2_con: independent_coordinate_names=yaw2 dependent_coordinate_name=aux7jnt_r2
      coupled_coordinates_function: SimmSpline: x=(-1.74533 1.74533) y=(-0.328122 0.328122)
    CoordinateCouplerConstraint aux7jnt_r3_con: independent_coordinate_names=pitch2
        dependent_coordinate_name=aux7jnt_r3
      coupled_coordinates_function: SimmSpline: x=(-1.74533 1.74533) y=(-0.326377 0.326377)
    CoordinateCouplerConstraint aux6jnt_r1_con: independent_coordinate_names=roll2 dependent_coordinate_name=aux6jnt_r1
      coupled_coordinates_function: SimmSpline: x=(-1.74533 1.74533) y=(-0.274017 0.274017)
    CoordinateCouplerConstraint aux6jnt_r2_con: independent_coordinate_names=yaw2 dependent_coordinate_name=aux6jnt_r2
      coupled_coordinates_function: SimmSpline: x=(-1.74533 1.74533) y=(-0.382227 0.382227)
    CoordinateCouplerConstraint aux6jnt_r3_con: independent_coordinate_names=pitch2
        dependent_coordinate_name=aux6jnt_r3
      coupled_coordinates_function: SimmSpline: x=(-1.74533 1.74533) y=(-0.383972 0.383972)
    CoordinateCouplerConstraint aux5jnt_r1_con: independent_coordinate_names=roll2 dependent_coordinate_name=aux5jnt_r1
      coupled_coordinates_function: SimmSpline: x=(-1.74533 1.74533) y=(-0.376991 0.376991)
    CoordinateCouplerConstraint aux5jnt_r2_con: independent_coordinate_names=yaw2 dependent_coordinate_name=aux5jnt_r2
      coupled_coordinates_function: SimmSpline: x=(-1.74533 1.74533) y=(-0.382227 0.382227)
    CoordinateCouplerConstraint aux5jnt_r3_con: independent_coordinate_names=pitch2
        dependent_coordinate_name=aux5jnt_r3
      coupled_coordinates_function: SimmSpline: x=(-1.74533 1.74533) y=(-0.383972 0.383972)
    CoordinateCouplerConstraint aux4jnt_r1_con: independent_coordinate_names=roll2 dependent_coordinate_name=aux4jnt_r1
      coupled_coordinates_function: SimmSpline: x=(-1.74533 1.74533) y=(-0.376991 0.376991)
    CoordinateCouplerConstraint aux4jnt_r2_con: independent_coordinate_names=yaw2 dependent_coordinate_name=aux4jnt_r2
      coupled_coordinates_function: SimmSpline: x=(-1.74533 1.74533) y=(-0.382227 0.382227)
    CoordinateCouplerConstraint aux4jnt_r3_con: independent_coordinate_names=pitch2
        dependent_coordinate_name=aux4jnt_r3
      coupled_coordinates_function: SimmSpline: x=(-1.74533 1.74533) y=(-0.287979 0.287979)
    CoordinateCouplerConstraint aux3jnt_r1_con: independent_coordinate_names=roll2 dependent_coordinate_name=aux3jnt_r1
      coupled_coordinates_function: SimmSpline: x=(-1.74533 1.74533) y=(-0.342085 0.342085)
    CoordinateCouplerConstraint aux3jnt_r2_con: independent_coordinate_names=yaw2 dependent_coordinate_name=aux3jnt_r2
      coupled_coordinates_function: SimmSpline: x=(-1.74533 1.74533) y=(-0.164061 0.164061)
    CoordinateCouplerConstraint aux3jnt_r3_con: independent_coordinate_names=pitch2
        dependent_coordinate_name=aux3jnt_r3
      coupled_coordinates_function: SimmSpline: x=(-1.74533 1.74533) y=(-0.191986 0.191986)
    CoordinateCouplerConstraint aux1jnt_r1_con: independent_coordinate_names=roll1 dependent_coordinate_name=aux1jnt_r1
      coupled_coordinates_function: SimmSpline: x=(-1.74533 1.74533) y=(-0.872665 0.872665)
    CoordinateCouplerConstraint aux1jnt_r2_con: independent_coordinate_names=yaw1 dependent_coordinate_name=aux1jnt_r2
      coupled_coordinates_function: SimmSpline: x=(-1.74533 1.74533) y=(-0.193732 0.193732)
    CoordinateCouplerConstraint aux1jnt_r3_con: independent_coordinate_names=pitch1
        dependent_coordinate_name=aux1jnt_r3
      coupled_coordinates_function: SimmSpline: x=(-1.74533 1.74533) y=(-0.970403 0.970403)
  ForceSet:
    PointActuator Skull_Impact: isDisabled=true min_control=1 max_control=1 body=skull point=(0 0.2 0)
        direction=(0 0 1) force_is_global=true optimal_force=150
    TorqueActuator Skull_Moment: isDisabled=true min_control=1 max_control=1 bodyA=skull bodyB=ground
        torque_is_global=true axis=(0 1 0) optimal_force=20
    Millard2012EquilibriumMuscle [values shared by the 60 below unless stated]:
      ActiveForceLengthCurve: min_norm_active_fiber_length=0.4441 transition_norm_fiber_length=0.73
          max_norm_active_fiber_length=1.8123 shallow_ascending_slope=0.8616 minimum_value=0
      ForceVelocityCurve: concentric_slope_at_vmax=0 concentric_slope_near_vmax=0.25 isometric_slope=5
          eccentric_slope_at_vmax=0 eccentric_slope_near_vmax=0.15 max_eccentric_velocity_force_multiplier=1.4
          concentric_curviness=0.6 eccentric_curviness=0.9
      FiberForceLengthCurve
      TendonForceLengthCurve
    Millard2012EquilibriumMuscle digastric_post: max_isometric_force=109.62 optimal_fiber_length=0.0205
        tendon_slack_length=0.034134 pennation_angle_at_optimal=0.2496 [radians] minimum_activation=0.01
      PathPoint digastric-post-P1: skull (-0.0061 0.0034 0.0477)
      PathPoint digastric-post-P2: cerv3 (0.02321 0.00597 0.0287)
    Millard2012EquilibriumMuscle digastric_ant: max_isometric_force=109.62 optimal_fiber_length=0.0142
        tendon_slack_length=0.005 pennation_angle_at_optimal=0 minimum_activation=0.01
      PathPoint digastric-post-P1: skull (0.0303 -0.0643 0.0173)
      PathPoint digastric-post-P2: cerv1 (0.07289 -0.05758 0.0057)
    Millard2012EquilibriumMuscle Geniohyoid: max_isometric_force=91.665 optimal_fiber_length=0.0343
        tendon_slack_length=0.00542 pennation_angle_at_optimal=0 minimum_activation=0.01
      PathPoint digastric-post-P1: cerv1 (0.0717298 -0.0537906 0.00509443)
      PathPoint digastric-post-P2: skull (0.0691 -0.0673 0.0016)
    Millard2012EquilibriumMuscle Mylohyoid_Post: max_isometric_force=50.085 optimal_fiber_length=0.0282
        tendon_slack_length=0.01401339 pennation_angle_at_optimal=0 minimum_activation=0.01
      PathPoint digastric-post-P1: cerv1 (0.07525 -0.05588 0.0031)
      PathPoint digastric-post-P2: skull (0.0413 -0.0389 0.0291)
    Millard2012EquilibriumMuscle Mylohyoid_Ant: max_isometric_force=150.255 optimal_fiber_length=0.02
        tendon_slack_length=0.00274 pennation_angle_at_optimal=0 default_fiber_length=0.1 minimum_activation=0.01
      PathPoint digastric-post-P1: cerv1 (0.09725 -0.05668 -0.0031)
      PathPoint digastric-post-P2: skull (0.0579 -0.0596 0.0158)
    Millard2012EquilibriumMuscle Stylohyoid_Lat: max_isometric_force=18.41786 optimal_fiber_length=0.0182
        tendon_slack_length=0.04955 pennation_angle_at_optimal=0.082 minimum_activation=0.01
      PathPoint digastric-post-P1: skull (0.0113 -0.0008 0.0376)
      PathPoint digastric-post-P2: cerv1 (0.0643381 -0.0496832 0.01544)
    Millard2012EquilibriumMuscle Stylohyoid_Med: max_isometric_force=18.41786 optimal_fiber_length=0.0182
        tendon_slack_length=0.04362451 pennation_angle_at_optimal=0.08203 minimum_activation=0.01
      PathPoint digastric-post-P1: skull (0.0118 -0.002 0.0376)
      PathPoint digastric-post-P2: cerv1 (0.0632661 -0.0450538 0.0162521)
    Millard2012EquilibriumMuscle Sterno_hyoid: max_isometric_force=54.81 optimal_fiber_length=0.0742
        tendon_slack_length=0.0318 pennation_angle_at_optimal=0 minimum_activation=0.01
      PathPoint stern_mast-P1: cerv3 (0.05742 -0.02314 0.00629)
      PathPoint default: ribcage (-0.014033 0.31252 0.01984)
    Millard2012EquilibriumMuscle SternoThyroid: max_isometric_force=61.425 optimal_fiber_length=0.06195
        tendon_slack_length=0.02655 pennation_angle_at_optimal=0 minimum_activation=0.01
      PathPoint stern_mast-P1: cerv3 (0.0404201 -0.04316 0.0133)
      PathPoint default: ribcage (-0.014643 0.30575 0.0153)
    Millard2012EquilibriumMuscle Omo_hyoid: max_isometric_force=70.875 optimal_fiber_length=0.04585
        tendon_slack_length=0.01965 pennation_angle_at_optimal=0 minimum_activation=0.01
      PathPoint stern_mast-P1: cerv3 (0.05212 -0.0139 0.0132)
      PathPoint default: ribcage (-0.021033 0.37083 0.03774)
    Millard2012EquilibriumMuscle digastric_post_L: max_isometric_force=109.62 optimal_fiber_length=0.0205
        tendon_slack_length=0.034134 pennation_angle_at_optimal=0.2496 minimum_activation=0.01
      PathPoint digastric-post-P1: skull (-0.0061 0.0034 -0.0477)
      PathPoint digastric-post-P2: cerv3 (0.02321 0.00597 -0.0287)
    Millard2012EquilibriumMuscle digastric_ant_L: max_isometric_force=109.62 optimal_fiber_length=0.0142
        tendon_slack_length=0.005 pennation_angle_at_optimal=0 minimum_activation=0.01
      PathPoint digastric-post-P1: skull (0.0303 -0.0643 -0.0173)
      PathPoint digastric-post-P2: cerv1 (0.07289 -0.05758 -0.0057)
    Millard2012EquilibriumMuscle Geniohyoid_L: max_isometric_force=91.665 optimal_fiber_length=0.0343
        tendon_slack_length=0.00542 pennation_angle_at_optimal=0 minimum_activation=0.01
      PathPoint digastric-post-P1: cerv1 (0.0714947 -0.0538159 -0.00630312)
      PathPoint digastric-post-P2: skull (0.0691 -0.0673 -0.0016)
    Millard2012EquilibriumMuscle Mylohyoid_Post_L: max_isometric_force=50.085 optimal_fiber_length=0.0282
        tendon_slack_length=0.01401339 pennation_angle_at_optimal=0 minimum_activation=0.01
      PathPoint digastric-post-P1: cerv1 (0.07525 -0.05588 -0.0031)
      PathPoint digastric-post-P2: skull (0.0413 -0.0389 -0.0291)
    Millard2012EquilibriumMuscle Mylohyoid_Ant_L: max_isometric_force=150.255 optimal_fiber_length=0.02
        tendon_slack_length=0.00274 pennation_angle_at_optimal=0 minimum_activation=0.01
      PathPoint digastric-post-P1: cerv1 (0.09725 -0.05668 0.0031)
      PathPoint digastric-post-P2: skull (0.0579 -0.0596 -0.0158)
    Millard2012EquilibriumMuscle Stylohyoid_Lat_L: max_isometric_force=18.41786 optimal_fiber_length=0.0182
        tendon_slack_length=0.04955 pennation_angle_at_optimal=0.082 minimum_activation=0.01
      PathPoint digastric-post-P1: skull (0.0113 -0.0008 -0.0376)
      PathPoint digastric-post-P2: cerv1 (0.0636822 -0.0497536 -0.0163531)
    Millard2012EquilibriumMuscle Stylohyoid_Med_L: max_isometric_force=18.41786 optimal_fiber_length=0.0182
        tendon_slack_length=0.04362451 pennation_angle_at_optimal=0.08203 minimum_activation=0.01
      PathPoint digastric-post-P1: skull (0.0118 -0.002 -0.0376)
      PathPoint digastric-post-P2: cerv1 (0.0625772 -0.0451277 -0.0171408)
    Millard2012EquilibriumMuscle Sterno_hyoid_L: max_isometric_force=54.81 optimal_fiber_length=0.0742
        tendon_slack_length=0.0318 pennation_angle_at_optimal=0 minimum_activation=0.01
      PathPoint stern_mast-P1: cerv3 (0.05742 -0.02314 -0.00629)
      PathPoint default: ribcage (-0.014033 0.31252 -0.01984)
    Millard2012EquilibriumMuscle SternoThyroid_L: max_isometric_force=61.425 optimal_fiber_length=0.06195
        tendon_slack_length=0.02655 pennation_angle_at_optimal=0 minimum_activation=0.01
      PathPoint stern_mast-P1: cerv3 (0.0404201 -0.04316 -0.0133)
      PathPoint default: ribcage (-0.014643 0.30575 -0.0153)
    Millard2012EquilibriumMuscle Omo_hyoid_L: max_isometric_force=70.875 optimal_fiber_length=0.04585
        tendon_slack_length=0.01965 pennation_angle_at_optimal=0 minimum_activation=0.01
      PathPoint stern_mast-P1: cerv3 (0.05212 -0.0139 -0.0132)
      PathPoint default: ribcage (-0.021033 0.37083 -0.03774)
    Millard12EqMuscleWithAfferents [values shared by the 24 below unless stated]: minimum_activation=0.01
        pennation_angle_at_optimal=0 [radians]
      ForceVelocityCurve: concentric_slope_at_vmax=0 concentric_slope_near_vmax=0.25 isometric_slope=5
          eccentric_slope_at_vmax=0 eccentric_slope_near_vmax=0.15 max_eccentric_velocity_force_multiplier=1.4
          concentric_curviness=0.6 eccentric_curviness=0.9
    Millard12EqMuscleWithAfferents stern_mast: max_isometric_force=186.165 optimal_fiber_length=0.108
        tendon_slack_length=0.056123 pennation_angle_at_optimal=0.2617994
      PathPoint P1: ribcage (-0.0007 0.3269 0.0096)
      PathPoint P2: skull (-0.0051 0.00693 0.0643)
      ActiveForceLengthCurve: min_norm_active_fiber_length=0.4441 transition_norm_fiber_length=0.73
          max_norm_active_fiber_length=1.8123 shallow_ascending_slope=0.8616 minimum_value=0
      FiberForceLengthCurve
      TendonForceLengthCurve
    Millard12EqMuscleWithAfferents stern_mast_L: max_isometric_force=186.165 optimal_fiber_length=0.108
        tendon_slack_length=0.056123 pennation_angle_at_optimal=0.2617994
      PathPoint P1: ribcage (-0.0007 0.3269 -0.0096)
      PathPoint P2: skull (-0.0051 0.00693 -0.0643)
      ActiveForceLengthCurve: min_norm_active_fiber_length=0.4441 transition_norm_fiber_length=0.73
          max_norm_active_fiber_length=1.8123 shallow_ascending_slope=0.8616 minimum_value=0
      FiberForceLengthCurve
      TendonForceLengthCurve
    Millard2012EquilibriumMuscle cleid_mast: max_isometric_force=93.0825 optimal_fiber_length=0.108
        tendon_slack_length=0.035198 pennation_angle_at_optimal=0.2617994 minimum_activation=0.01
      PathPoint P1: rclavicle (0.00388 0.00542 0.0352)
      PathPoint P2: skull (-0.0051 0.00693 0.0643)
    Millard2012EquilibriumMuscle cleid_mast_L: max_isometric_force=93.0825 optimal_fiber_length=0.108
        tendon_slack_length=0.035198 pennation_angle_at_optimal=0.2617994 minimum_activation=0.01
      PathPoint P1: lclavicle (0.00388 0.00542 -0.0352)
      PathPoint P2: skull (-0.0051 0.00693 -0.0643)
    Millard2012EquilibriumMuscle cleid_occ: max_isometric_force=93.0825 optimal_fiber_length=0.108
        tendon_slack_length=0.069467 pennation_angle_at_optimal=0.2617994 minimum_activation=0.01
      PathPoint P1: rclavicle (0.00388 0.00542 0.0352)
      PathPoint P2: skull (-0.035 0.023 0.0664)
    Millard2012EquilibriumMuscle cleid_occ_L: max_isometric_force=93.0825 optimal_fiber_length=0.108
        tendon_slack_length=0.069467 pennation_angle_at_optimal=0.2617994 minimum_activation=0.01
      PathPoint P1: lclavicle (0.00388 0.00542 -0.0352)
      PathPoint P2: skull (-0.035 0.023 -0.0664)
    Millard2012EquilibriumMuscle scalenus_ant: max_isometric_force=138.915 optimal_fiber_length=0.042
        tendon_slack_length=0.053421 pennation_angle_at_optimal=0.1745329 minimum_activation=0.01
      PathPoint P1: ribcage (-0.02139 0.33246 0.0529)
      PathPoint P2: cerv4 (0.00713 0.0079 0.02323)
    Millard2012EquilibriumMuscle scalenus_ant_L: max_isometric_force=138.915 optimal_fiber_length=0.042
        tendon_slack_length=0.053421 pennation_angle_at_optimal=0.1745329 minimum_activation=0.01
      PathPoint P1: ribcage (-0.02139 0.33246 -0.0529)
      PathPoint P2: cerv4 (0.00713 0.0079 -0.02323)
    Millard2012EquilibriumMuscle scalenus_med: max_isometric_force=100.94 optimal_fiber_length=0.05
        tendon_slack_length=0.061508 pennation_angle_at_optimal=0.1745329 minimum_activation=0.01
      PathPoint P1: ribcage (-0.03398 0.34333 0.0627)
      PathPoint P2: cerv3 (-0.00902 0.00981 0.02119)
    Millard2012EquilibriumMuscle scalenus_med_L: max_isometric_force=100.94 optimal_fiber_length=0.05
        tendon_slack_length=0.061508 pennation_angle_at_optimal=0.1745329 minimum_activation=0.01
      PathPoint P1: ribcage (-0.03398 0.34333 -0.0627)
      PathPoint P2: cerv3 (-0.00902 0.00981 -0.02119)
    Millard2012EquilibriumMuscle scalenus_post: max_isometric_force=76.93 optimal_fiber_length=0.062
        tendon_slack_length=0.072845 pennation_angle_at_optimal=0.1745329 minimum_activation=0.01
      PathPoint P1: ribcage (-0.03638 0.3127 0.1062)
      PathPoint P2: cerv5 (-0.0032 0.01371 0.0257)
    Millard2012EquilibriumMuscle scalenus_post_L: max_isometric_force=76.93 optimal_fiber_length=0.062
        tendon_slack_length=0.072845 pennation_angle_at_optimal=0.1745329 minimum_activation=0.01
      PathPoint P1: ribcage (-0.03638 0.3127 -0.1062)
      PathPoint P2: cerv5 (-0.0032 0.01371 -0.0257)
    Millard2012EquilibriumMuscle long_cap_sklc4: max_isometric_force=89.964 optimal_fiber_length=0.038
        tendon_slack_length=0.041297 pennation_angle_at_optimal=0.08726646 minimum_activation=0.01
      PathPoint P1: cerv4 (0.00652 0.01164 0.0242)
      PathPoint P2: cerv3 (0.01197 0.01009 0.01897)
      PathPoint P3: cerv2 (0.0172 0.00829 0.01477)
      PathPoint P4: cerv1 (0.05818 0.00309 0.01159)
      PathPoint P5: skull (0.0098 0.01596 0.0036)
    Millard2012EquilibriumMuscle long_cap_sklc4_L: max_isometric_force=89.964 optimal_fiber_length=0.038
        tendon_slack_length=0.041297 pennation_angle_at_optimal=0.08726646 minimum_activation=0.01
      PathPoint P1: cerv4 (0.00652 0.01164 -0.0242)
      PathPoint P2: cerv3 (0.01197 0.01009 -0.01897)
      PathPoint P3: cerv2 (0.0172 0.00829 -0.01477)
      PathPoint P4: cerv1 (0.05818 0.00309 -0.01159)
      PathPoint P5: skull (0.0098 0.01596 -0.0036)
    Millard2012EquilibriumMuscle long_col_c1thx: max_isometric_force=32.319 optimal_fiber_length=0.08913
        tendon_slack_length=0.087519 pennation_angle_at_optimal=0.08726646 minimum_activation=0.01
      PathPoint P1: spine (-0.04888 0.30334 0.0037)
      PathPoint P2: cerv7 (0.0232 0.0011 0.004)
      PathPoint P3: cerv6 (0.02314 0.00231 0.00402)
      PathPoint P4: cerv5 (0.02228 0.00228 0.0039)
      PathPoint P5: cerv4 (0.02205 0.00331 0.00379)
      PathPoint P6: cerv3 (0.02212 0.00603 0.00368)
      PathPoint P7: cerv2 (0.02122 0.00973 0.00356)
      PathPoint P8: cerv1 (0.05825 0.00482 0.0031)
    Millard2012EquilibriumMuscle long_col_c1thx_L: max_isometric_force=32.319 optimal_fiber_length=0.08913
        tendon_slack_length=0.087519 pennation_angle_at_optimal=0.08726646 minimum_activation=0.01
      PathPoint P1: spine (-0.04888 0.30334 -0.0037)
      PathPoint P2: cerv7 (0.0232 0.0011 -0.004)
      PathPoint P3: cerv6 (0.02314 0.00231 -0.00402)
      PathPoint P4: cerv5 (0.02228 0.00228 -0.0039)
      PathPoint P5: cerv4 (0.02205 0.00331 -0.00379)
      PathPoint P6: cerv3 (0.02212 0.00603 -0.00368)
      PathPoint P7: cerv2 (0.02122 0.00973 -0.00356)
      PathPoint P8: cerv1 (0.05825 0.00482 -0.0031)
    Millard2012EquilibriumMuscle long_col_c1c5: max_isometric_force=32.319 optimal_fiber_length=0.03592
        tendon_slack_length=0.035239 pennation_angle_at_optimal=0.08726646 minimum_activation=0.01
      PathPoint P1: cerv5 (0.00669 0.00889 0.0238)
      PathPoint P2: cerv4 (0.01121 0.00749 0.0207)
      PathPoint P3: cerv2 (0.01739 0.00159 0.01365)
      PathPoint P4: cerv1 (0.05725 0.00482 0.0062)
    Millard2012EquilibriumMuscle long_col_c1c5_L: max_isometric_force=32.319 optimal_fiber_length=0.03592
        tendon_slack_length=0.035239 pennation_angle_at_optimal=0.08726646 minimum_activation=0.01
      PathPoint P1: cerv5 (0.00669 0.00889 -0.0238)
      PathPoint P2: cerv4 (0.01121 0.00749 -0.0207)
      PathPoint P3: cerv2 (0.01739 0.00159 -0.01365)
      PathPoint P4: cerv1 (0.05725 0.00482 -0.0062)
    Millard2012EquilibriumMuscle long_col_c5thx: max_isometric_force=32.319 optimal_fiber_length=0.05758
        tendon_slack_length=0.054794 pennation_angle_at_optimal=0.08726646 minimum_activation=0.01
      PathPoint P1: spine (-0.04981 0.30296 0.0068)
      PathPoint P2: spine (-0.04825 0.32027 0.01022)
      PathPoint P3: spine (-0.04566 0.33463 0.01337)
      PathPoint P4: spine (-0.04466 0.3436 0.01508)
      PathPoint P5: spine (-0.04239 0.35783 0.01778)
      PathPoint P6: cerv7 (0.01111 0.00731 0.01979)
      PathPoint P7: cerv6 (0.00961 0.00713 0.02216)
      PathPoint P8: cerv5 (0.00669 0.00889 0.0238)
    Millard2012EquilibriumMuscle long_col_c5thx_L: max_isometric_force=32.319 optimal_fiber_length=0.05758
        tendon_slack_length=0.054794 pennation_angle_at_optimal=0.08726646 minimum_activation=0.01
      PathPoint P1: spine (-0.04981 0.30296 -0.0068)
      PathPoint P2: spine (-0.04825 0.32027 -0.01022)
      PathPoint P3: spine (-0.04566 0.33463 -0.01337)
      PathPoint P4: spine (-0.04466 0.3436 -0.01508)
      PathPoint P5: spine (-0.04239 0.35783 -0.01778)
      PathPoint P6: cerv7 (0.01111 0.00731 -0.01979)
      PathPoint P7: cerv6 (0.00961 0.00713 -0.02216)
      PathPoint P8: cerv5 (0.00669 0.00889 -0.0238)
    Millard2012EquilibriumMuscle trap_cl: max_isometric_force=108.64 optimal_fiber_length=0.084
        tendon_slack_length=0.119222 pennation_angle_at_optimal=0.5235988 minimum_activation=0.01
      PathPoint P1: rclavicle (-0.0294 0.0232 0.0869)
      PathPoint P2: skull (-0.08031 0.02604 0.01324)
    Millard2012EquilibriumMuscle trap_cl_L: max_isometric_force=108.64 optimal_fiber_length=0.084
        tendon_slack_length=0.119222 pennation_angle_at_optimal=0.5235988 minimum_activation=0.01
      PathPoint P1: lclavicle (-0.0294 0.0232 -0.0869)
      PathPoint P2: skull (-0.08031 0.02604 -0.01324)
    Millard2012EquilibriumMuscle trap_acr: max_isometric_force=527.73 optimal_fiber_length=0.092
        tendon_slack_length=0.076582 pennation_angle_at_optimal=0 minimum_activation=0.01
      PathPoint P1: rscapula (-0.02379 -0.00916 -0.00736)
      PathPoint P2: cerv7 (-0.0477 0.019 0.00305)
    Millard2012EquilibriumMuscle trap_acr_L: max_isometric_force=527.73 optimal_fiber_length=0.092
        tendon_slack_length=0.076582 pennation_angle_at_optimal=0 minimum_activation=0.01
      PathPoint P1: lscapula (-0.02379 -0.00916 0.00736)
      PathPoint P2: cerv7 (-0.0477 0.019 -0.00305)
    Millard12EqMuscleWithAfferents splen_cap_sklc6: max_isometric_force=69.314 optimal_fiber_length=0.095
        tendon_slack_length=0.026013
      PathPoint P1: cerv6 (-0.0486 0.01647 0.00305)
      PathPoint P2: skull (-0.06164 0.01918 0.044)
      ActiveForceLengthCurve: min_norm_active_fiber_length=0.4441 transition_norm_fiber_length=0.73
          max_norm_active_fiber_length=1.8123 shallow_ascending_slope=0.8616 minimum_value=0
      FiberForceLengthCurve
      TendonForceLengthCurve
    Millard12EqMuscleWithAfferents splen_cap_sklc6_L: max_isometric_force=69.314 optimal_fiber_length=0.095
        tendon_slack_length=0.026013
      PathPoint P1: cerv6 (-0.0486 0.01647 -0.00305)
      PathPoint P2: skull (-0.06164 0.01918 -0.044)
      ActiveForceLengthCurve: min_norm_active_fiber_length=0.4441 transition_norm_fiber_length=0.73
          max_norm_active_fiber_length=1.8123 shallow_ascending_slope=0.8616 minimum_value=0
      FiberForceLengthCurve
      TendonForceLengthCurve
    Millard2012EquilibriumMuscle splen_cap_sklthx: max_isometric_force=69.314 optimal_fiber_length=0.095
        tendon_slack_length=0.081861 pennation_angle_at_optimal=0 minimum_activation=0.01
      PathPoint P1: spine (-0.10384 0.33902 0.003)
      PathPoint P2: skull (-0.04016 0.011 0.05423)
    Millard2012EquilibriumMuscle splen_cap_sklthx_L: max_isometric_force=69.314 optimal_fiber_length=0.095
        tendon_slack_length=0.081861 pennation_angle_at_optimal=0 minimum_activation=0.01
      PathPoint P1: spine (-0.10384 0.33902 -0.003)
      PathPoint P2: skull (-0.04016 0.011 -0.05423)
    Millard2012EquilibriumMuscle splen_cerv_c3thx: max_isometric_force=69.314 optimal_fiber_length=0.095
        tendon_slack_length=0.108438 pennation_angle_at_optimal=0 minimum_activation=0.01
      PathPoint P1: spine (-0.12848 0.26222 0.0041)
      PathPoint P2: cerv3 (-0.00787 0.01005 0.02365)
    Millard2012EquilibriumMuscle splen_cerv_c3thx_L: max_isometric_force=69.314 optimal_fiber_length=0.095
        tendon_slack_length=0.108438 pennation_angle_at_optimal=0 minimum_activation=0.01
      PathPoint P1: spine (-0.12848 0.26222 -0.0041)
      PathPoint P2: cerv3 (-0.00787 0.01005 -0.02365)
    Millard12EqMuscleWithAfferents semi_cap_sklc5: max_isometric_force=89.67 optimal_fiber_length=0.068
        tendon_slack_length=0.046562 pennation_angle_at_optimal=0.08726646
      PathPoint P1: cerv5 (-0.00931 0.01154 0.0235)
      PathPoint P2: skull (-0.07441 0.02 0.018)
      ActiveForceLengthCurve: min_norm_active_fiber_length=0.4441 transition_norm_fiber_length=0.73
          max_norm_active_fiber_length=1.8123 shallow_ascending_slope=0.8616 minimum_value=0
      FiberForceLengthCurve
      TendonForceLengthCurve
    Millard12EqMuscleWithAfferents semi_cap_sklc5_L: max_isometric_force=89.67 optimal_fiber_length=0.068
        tendon_slack_length=0.046562 pennation_angle_at_optimal=0.08726646
      PathPoint P1: cerv5 (-0.00931 0.01154 -0.0235)
      PathPoint P2: skull (-0.07441 0.02 -0.018)
      ActiveForceLengthCurve: min_norm_active_fiber_length=0.4441 transition_norm_fiber_length=0.73
          max_norm_active_fiber_length=1.8123 shallow_ascending_slope=0.8616 minimum_value=0
      FiberForceLengthCurve
      TendonForceLengthCurve
    Millard2012EquilibriumMuscle semi_cap_sklthx: max_isometric_force=89.67 optimal_fiber_length=0.068
        tendon_slack_length=0.06889 pennation_angle_at_optimal=0.08726646 minimum_activation=0.01
      PathPoint P1: spine (-0.08539 0.37732 0.0347)
      PathPoint P2: skull (-0.07671 0.02 0.0111)
    Millard2012EquilibriumMuscle semi_cap_sklthx_L: max_isometric_force=89.67 optimal_fiber_length=0.068
        tendon_slack_length=0.06889 pennation_angle_at_optimal=0.08726646 minimum_activation=0.01
      PathPoint P1: spine (-0.08539 0.37732 -0.0347)
      PathPoint P2: skull (-0.07671 0.02 -0.0111)
    Millard2012EquilibriumMuscle semi_cerv_c3thx: max_isometric_force=89.67 optimal_fiber_length=0.068
        tendon_slack_length=0.027374 pennation_angle_at_optimal=0.08726646 minimum_activation=0.01
      PathPoint P1: spine (-0.08896 0.34997 0.02607)
      PathPoint P2: cerv3 (-0.04064 -0.00322 0.0024)
    Millard2012EquilibriumMuscle semi_cerv_c3thx_L: max_isometric_force=89.67 optimal_fiber_length=0.068
        tendon_slack_length=0.027374 pennation_angle_at_optimal=0.08726646 minimum_activation=0.01
      PathPoint P1: spine (-0.08896 0.34997 -0.02607)
      PathPoint P2: cerv3 (-0.04064 -0.00322 -0.0024)
    Millard12EqMuscleWithAfferents levator_scap: max_isometric_force=106.82 optimal_fiber_length=0.113
        tendon_slack_length=0.021875
      PathPoint P1: rscapula (-0.09749 -0.03624 -0.08146)
      PathPoint P2: cerv2 (-0.01186 0.00725 0.02121)
      ActiveForceLengthCurve: min_norm_active_fiber_length=0.4441 transition_norm_fiber_length=0.73
          max_norm_active_fiber_length=1.8123 shallow_ascending_slope=0.8616 minimum_value=0
      FiberForceLengthCurve
      TendonForceLengthCurve
    Millard12EqMuscleWithAfferents levator_scap_L: max_isometric_force=106.82 optimal_fiber_length=0.113
        tendon_slack_length=0.021875
      PathPoint P1: lscapula (-0.09749 -0.03624 0.08146)
      PathPoint P2: cerv2 (-0.01186 0.00725 -0.02121)
      ActiveForceLengthCurve: min_norm_active_fiber_length=0.4441 transition_norm_fiber_length=0.73
          max_norm_active_fiber_length=1.8123 shallow_ascending_slope=0.8616 minimum_value=0
      FiberForceLengthCurve
      TendonForceLengthCurve
    Millard12EqMuscleWithAfferents longissi_cap_sklc6: max_isometric_force=43.652 optimal_fiber_length=0.07185
        tendon_slack_length=0.023946
      PathPoint P1: cerv6 (-0.00817 0.01515 0.02759)
      PathPoint P2: skull (-0.0344 0.0051 0.055)
      ActiveForceLengthCurve: min_norm_active_fiber_length=0.4441 transition_norm_fiber_length=0.73
          max_norm_active_fiber_length=1.8123 shallow_ascending_slope=0.8616 minimum_value=0
      FiberForceLengthCurve
      TendonForceLengthCurve
    Millard12EqMuscleWithAfferents longissi_cap_sklc6_L: max_isometric_force=43.652 optimal_fiber_length=0.07185
        tendon_slack_length=0.023946
      PathPoint P1: cerv6 (-0.00817 0.01515 -0.02759)
      PathPoint P2: skull (-0.0344 0.0051 -0.055)
      ActiveForceLengthCurve: min_norm_active_fiber_length=0.4441 transition_norm_fiber_length=0.73
          max_norm_active_fiber_length=1.8123 shallow_ascending_slope=0.8616 minimum_value=0
      FiberForceLengthCurve
      TendonForceLengthCurve
    Millard2012EquilibriumMuscle longissi_cerv_c4thx: max_isometric_force=28.07 optimal_fiber_length=0.131813
        tendon_slack_length=0.042329 pennation_angle_at_optimal=0 minimum_activation=0.01
      PathPoint P1: spine (-0.10994 0.27586 0.03215)
      PathPoint P2: spine (-0.10918 0.30238 0.03041)
      PathPoint P3: spine (-0.09978 0.32692 0.02919)
      PathPoint P4: spine (-0.0813 0.373 0.0279)
      PathPoint P5: cerv4 (-0.00709 0.01157 0.0261)
    Millard2012EquilibriumMuscle longissi_cerv_c4thx_L: max_isometric_force=28.07 optimal_fiber_length=0.131813
        tendon_slack_length=0.042329 pennation_angle_at_optimal=0 minimum_activation=0.01
      PathPoint P1: spine (-0.10994 0.27586 -0.03215)
      PathPoint P2: spine (-0.10918 0.30238 -0.03041)
      PathPoint P3: spine (-0.09978 0.32692 -0.02919)
      PathPoint P4: spine (-0.0813 0.373 -0.0279)
      PathPoint P5: cerv4 (-0.00709 0.01157 -0.0261)
    Millard2012EquilibriumMuscle iliocost_cerv_c5rib: max_isometric_force=28.07 optimal_fiber_length=0.080895
        tendon_slack_length=0.025706 pennation_angle_at_optimal=0 minimum_activation=0.01
      PathPoint P1: spine (-0.10349 0.32797 0.0533)
      PathPoint P2: spine (-0.08374 0.37638 0.04035)
      PathPoint P3: cerv5 (-0.0094 0.01258 0.026)
    Millard2012EquilibriumMuscle iliocost_cerv_c5rib_L: max_isometric_force=28.07 optimal_fiber_length=0.080895
        tendon_slack_length=0.025706 pennation_angle_at_optimal=0 minimum_activation=0.01
      PathPoint P1: spine (-0.10349 0.32797 -0.0533)
      PathPoint P2: spine (-0.08374 0.37638 -0.04035)
      PathPoint P3: cerv5 (-0.0094 0.01258 -0.026)
    Millard12EqMuscleWithAfferents rectcap_post_maj: max_isometric_force=45.668 optimal_fiber_length=0.037
        tendon_slack_length=0.022832 pennation_angle_at_optimal=0.08726646
      PathPoint P1: cerv2 (-0.03637 -0.00647 0.0024)
      PathPoint P2: skull (-0.0604 0.009 0.023)
      ActiveForceLengthCurve: min_norm_active_fiber_length=0.4441 transition_norm_fiber_length=0.73
          max_norm_active_fiber_length=1.8123 shallow_ascending_slope=0.8616 minimum_value=0
      FiberForceLengthCurve
      TendonForceLengthCurve
    Millard12EqMuscleWithAfferents rectcap_post_maj_L: max_isometric_force=45.668 optimal_fiber_length=0.037
        tendon_slack_length=0.022832 pennation_angle_at_optimal=0.08726646
      PathPoint P1: cerv2 (-0.03637 -0.00647 -0.0024)
      PathPoint P2: skull (-0.0604 0.009 -0.023)
      ActiveForceLengthCurve: min_norm_active_fiber_length=0.4441 transition_norm_fiber_length=0.73
          max_norm_active_fiber_length=1.8123 shallow_ascending_slope=0.8616 minimum_value=0
      FiberForceLengthCurve
      TendonForceLengthCurve
    Millard2012EquilibriumMuscle rectcap_post_min: max_isometric_force=25.088 optimal_fiber_length=0.019
        tendon_slack_length=0.016897 pennation_angle_at_optimal=0.08726646 minimum_activation=0.01
      PathPoint P1: cerv1 (7e-5 0.0009 0.0061)
      PathPoint P2: skull (-0.0667 0.009 0.0145)
    Millard2012EquilibriumMuscle rectcap_post_min_L: max_isometric_force=25.088 optimal_fiber_length=0.019
        tendon_slack_length=0.016897 pennation_angle_at_optimal=0.08726646 minimum_activation=0.01
      PathPoint P1: cerv1 (7e-5 0.0009 -0.0061)
      PathPoint P2: skull (-0.0667 0.009 -0.0145)
    Millard2012EquilibriumMuscle obl_cap_sup: max_isometric_force=51.107 optimal_fiber_length=0.025
        tendon_slack_length=0.020417 pennation_angle_at_optimal=0.1745329 minimum_activation=0.01
      PathPoint P1: cerv1 (0.03505 0.00385 0.042)
      PathPoint P2: skull (-0.04758 0.00931 0.03818)
    Millard2012EquilibriumMuscle obl_cap_sup_L: max_isometric_force=51.107 optimal_fiber_length=0.025
        tendon_slack_length=0.020417 pennation_angle_at_optimal=0.1745329 minimum_activation=0.01
      PathPoint P1: cerv1 (0.03505 0.00385 -0.042)
      PathPoint P2: skull (-0.04758 0.00931 -0.03818)
    Millard2012EquilibriumMuscle obl_cap_inf: max_isometric_force=63.406 optimal_fiber_length=0.038
        tendon_slack_length=0.015607 pennation_angle_at_optimal=0 minimum_activation=0.01
      PathPoint P1: cerv2 (-0.03637 -0.00647 0.00547)
      PathPoint P2: cerv1 (0.02996 0.00349 0.03791)
    Millard2012EquilibriumMuscle obl_cap_inf_L: max_isometric_force=63.406 optimal_fiber_length=0.038
        tendon_slack_length=0.015607 pennation_angle_at_optimal=0 minimum_activation=0.01
      PathPoint P1: cerv2 (-0.03637 -0.00647 -0.00547)
      PathPoint P2: cerv1 (0.02996 0.00349 -0.03791)
    BushingForce [values shared by the 8 below unless stated]: location_body_1=(0 0 0) orientation_body_1=(0 0 0)
        location_body_2=(0 0 0) orientation_body_2=(0 0 0) translational_stiffness=(0 0 0) [N/m]
        translational_damping=(0 0 0) [N/(m/s)]
    BushingForce Spine_C7_Bushing: body_1=spine body_2=cerv7 rotational_stiffness=(27.5 13.75 27.5) [Nm/rad]
        rotational_damping=(2.75 1.375 2.75) [Nm/(rad/s)]
    BushingForce C7_C6_Bushing: body_1=cerv7 body_2=cerv6 rotational_stiffness=(27.5 13.75 27.5)
        rotational_damping=(2.75 1.375 2.75)
    BushingForce C6_C5_Bushing: body_1=cerv6 body_2=cerv5 rotational_stiffness=(27.5 13.75 27.5)
        rotational_damping=(2.75 1.375 2.75)
    BushingForce C5_C4_Bushing: body_1=cerv5 body_2=cerv4 rotational_stiffness=(23.2 11.6 23.2)
        rotational_damping=(2.32 1.16 2.32)
    BushingForce C4_C3_Bushing: body_1=cerv4 body_2=cerv3 rotational_stiffness=(23.2 11.6 23.2)
        rotational_damping=(2.32 1.16 2.32)
    BushingForce C3_C2_Bushing: body_1=cerv3 body_2=cerv2 rotational_stiffness=(7.8 3.9 7.8)
        rotational_damping=(0.78 0.39 0.78)
    BushingForce C2_C1_Bushing: body_1=cerv2 body_2=cerv1 rotational_stiffness=(7.8 3.9 7.8)
        rotational_damping=(0.78 0.39 0.78)
    BushingForce C1_skull_Bushing: body_1=cerv1 body_2=skull rotational_stiffness=(7.8 3.9 7.8)
        rotational_damping=(0.78 0.39 0.78)
    Millard12EqMuscleWithAfferents r_Lateral_Rectus: min_control=0 max_control=1 optimal_force=1
        max_isometric_force=1.471 optimal_fiber_length=0.04898 tendon_slack_length=0.0084
        max_contraction_velocity=3.8484 ignore_tendon_compliance=true fiber_damping=0 default_activation=0
        default_fiber_length=0.0513 activation_time_constant=0.005 [seconds] deactivation_time_constant=0.005 [seconds]
      PathPoint RLR-Origin-P1: skull (0.043 0.0516 0.021)
      PathPoint RRL-Pulley-P2: skull (0.0668 0.0513 0.046)
      PathPoint RLR-Insertion-P3: r_eye (0.0065 0 0.0101)
      PathWrap: wrap_object=right_eye_wrap method=axial
      ActiveForceLengthCurve: min_norm_active_fiber_length=0.55 transition_norm_fiber_length=0.7
          max_norm_active_fiber_length=1.8 shallow_ascending_slope=2.4 minimum_value=0
      FiberForceLengthCurve: strain_at_zero_force=-0.18 strain_at_one_norm_force=0.4
      TendonForceLengthCurve: strain_at_one_norm_force=1
    Millard12EqMuscleWithAfferents r_Medial_Rectus: min_control=0 max_control=1 optimal_force=1
        max_isometric_force=1.574 optimal_fiber_length=0.04084 tendon_slack_length=0.0038
        max_contraction_velocity=4.6155 ignore_tendon_compliance=true fiber_damping=0 default_activation=0
        default_fiber_length=0.0398 activation_time_constant=0.005 deactivation_time_constant=0.005
      PathPoint RMR-Origin-P1: skull (0.047 0.0516 0.017)
      PathPoint RML-Pulley-P2: skull (0.0717 0.05114 0.0194)
      PathPoint RMR-Insertion-P3: r_eye (0.0088 0 -0.0096)
      PathWrap: wrap_object=right_eye_wrap method=axial
      ActiveForceLengthCurve: min_norm_active_fiber_length=0.55 transition_norm_fiber_length=0.7
          max_norm_active_fiber_length=1.8 shallow_ascending_slope=2.4 minimum_value=0
      FiberForceLengthCurve: strain_at_zero_force=-0.18 strain_at_one_norm_force=0.4
      TendonForceLengthCurve: strain_at_one_norm_force=1
    Millard12EqMuscleWithAfferents r_Superior_Rectus: min_control=0 max_control=1 optimal_force=1
        max_isometric_force=1.1768 optimal_fiber_length=0.04487 tendon_slack_length=0.0054
        max_contraction_velocity=4.2009 ignore_tendon_compliance=true fiber_damping=0 default_activation=0
        default_fiber_length=0.04495 activation_time_constant=0.005 deactivation_time_constant=0.005
      PathPoint RSR-Origin-P1: skull (0.0453 0.0546 0.018)
      PathPoint RSL-Pulley-P2: skull (0.0678 0.063 0.032)
      PathPoint RSR-Insertion-P3: r_eye (0.0076 0.0104 0)
      PathWrap: wrap_object=right_eye_wrap method=axial
      ActiveForceLengthCurve: min_norm_active_fiber_length=0.55 transition_norm_fiber_length=0.7
          max_norm_active_fiber_length=1.8 shallow_ascending_slope=2.4 minimum_value=0
      FiberForceLengthCurve: strain_at_zero_force=-0.18 strain_at_one_norm_force=0.4
      TendonForceLengthCurve: strain_at_one_norm_force=1
    Millard12EqMuscleWithAfferents r_Inferior_Rectus: min_control=0 max_control=1 optimal_force=1
        max_isometric_force=1.4269 optimal_fiber_length=0.04549 tendon_slack_length=0.0048
        max_contraction_velocity=4.1437 ignore_tendon_compliance=true fiber_damping=0 default_activation=0
        default_fiber_length=0.0449 activation_time_constant=0.005 deactivation_time_constant=0.005
      PathPoint RIR-Origin-P1: skull (0.0453 0.0486 0.018)
      PathPoint RIL-Pulley-P2: skull (0.0728 0.0382 0.0298)
      PathPoint RIR-Insertion-P3: r_eye (0.00805 -0.0102 0)
      PathWrap: wrap_object=right_eye_wrap method=axial
      ActiveForceLengthCurve: min_norm_active_fiber_length=0.55 transition_norm_fiber_length=0.7
          max_norm_active_fiber_length=1.8 shallow_ascending_slope=2.4 minimum_value=0
      FiberForceLengthCurve: strain_at_zero_force=-0.18 strain_at_one_norm_force=0.4
      TendonForceLengthCurve: strain_at_one_norm_force=1
    Millard12EqMuscleWithAfferents r_Superior_Oblique: min_control=0 max_control=1 optimal_force=1
        max_isometric_force=0.6031 optimal_fiber_length=0.03956 tendon_slack_length=0.0265
        max_contraction_velocity=4.7648 ignore_tendon_compliance=true fiber_damping=0 default_activation=0
        default_fiber_length=0.06137 activation_time_constant=0.005 deactivation_time_constant=0.005
      PathPoint RIR-Origin-P1: skull (0.0461658 0.05214521 0.0175598)
      PathPoint RSO-Pulley-P2: skull (0.0852 0.0632 0.0188)
      PathPoint RSO-Insertion-P3: r_eye (-0.0044 0.011 0.0029)
      PathWrap: wrap_object=right_eye_wrap2 method=axial
      ActiveForceLengthCurve: min_norm_active_fiber_length=0.55 transition_norm_fiber_length=0.7
          max_norm_active_fiber_length=1.8 shallow_ascending_slope=2.4 minimum_value=0
      FiberForceLengthCurve: strain_at_zero_force=-0.18 strain_at_one_norm_force=0.4
      TendonForceLengthCurve: strain_at_one_norm_force=1
    Millard12EqMuscleWithAfferents r_Inferior_Oblique: min_control=0 max_control=1 optimal_force=1
        max_isometric_force=0.559 optimal_fiber_length=0.0411 tendon_slack_length=0.0015
        max_contraction_velocity=4.5863 ignore_tendon_compliance=true fiber_damping=0 default_activation=0
        default_fiber_length=0.03774 activation_time_constant=0.005 deactivation_time_constant=0.005
      PathPoint RIO-Origin-P1: skull (0.0883 0.0356 0.0229)
      PathPoint RIO-Pulley-P2: skull (0.06982 0.0375 0.034)
      PathPoint RIO-Insertion-P3: r_eye (-0.008 0 0.009)
      PathWrap: wrap_object=right_eye_wrap2 method=axial
      ActiveForceLengthCurve: min_norm_active_fiber_length=0.55 transition_norm_fiber_length=0.7
          max_norm_active_fiber_length=1.8 shallow_ascending_slope=2.4 minimum_value=0
      FiberForceLengthCurve: strain_at_zero_force=-0.18 strain_at_one_norm_force=0.4
      TendonForceLengthCurve: strain_at_one_norm_force=1
    SpringGeneralizedForce [values shared by the 6 below unless stated]: stiffness=0.002225 rest_length=0 viscosity=0
    SpringGeneralizedForce r_add_adb_tissue: coordinate=r_eye_add_abd
    SpringGeneralizedForce r_sup_inf_tissue: coordinate=r_eye_sup_inf
    SpringGeneralizedForce r_inc_exc_tissue: coordinate=r_eye_inc_exc
    Millard12EqMuscleWithAfferents l_Lateral_Rectus: min_control=0 max_control=1 optimal_force=1
        max_isometric_force=1.471 optimal_fiber_length=0.04898 tendon_slack_length=0.0084
        max_contraction_velocity=3.8484 ignore_tendon_compliance=true fiber_damping=0 default_activation=0
        default_fiber_length=0.0513 activation_time_constant=0.005 deactivation_time_constant=0.005
      PathPoint LLR-Origin-P1: skull (0.043 0.0516 -0.021)
      PathPoint LRL-Pulley-P2: skull (0.0668 0.0513 -0.046)
      PathPoint LLR-Insertion-P3: l_eye (0.0065 0 -0.0101)
      PathWrap: wrap_object=left_eye_wrap method=axial
      ActiveForceLengthCurve: min_norm_active_fiber_length=0.55 transition_norm_fiber_length=0.7
          max_norm_active_fiber_length=1.8 shallow_ascending_slope=2.4 minimum_value=0
      FiberForceLengthCurve: strain_at_zero_force=-0.18 strain_at_one_norm_force=0.4
      TendonForceLengthCurve: strain_at_one_norm_force=1
    Millard12EqMuscleWithAfferents l_Medial_Rectus: min_control=0 max_control=1 optimal_force=1
        max_isometric_force=1.574 optimal_fiber_length=0.04084 tendon_slack_length=0.0038
        max_contraction_velocity=4.6155 ignore_tendon_compliance=true fiber_damping=0 default_activation=0
        default_fiber_length=0.0398 activation_time_constant=0.005 deactivation_time_constant=0.005
      PathPoint LMR-Origin-P1: skull (0.047 0.0516 -0.017)
      PathPoint LML-Pulley-P2: skull (0.0717 0.05114 -0.0194)
      PathPoint LMR-Insertion-P3: l_eye (0.0088 0 0.0096)
      PathWrap: wrap_object=left_eye_wrap method=axial
      ActiveForceLengthCurve: min_norm_active_fiber_length=0.55 transition_norm_fiber_length=0.7
          max_norm_active_fiber_length=1.8 shallow_ascending_slope=2.4 minimum_value=0
      FiberForceLengthCurve: strain_at_zero_force=-0.18 strain_at_one_norm_force=0.4
      TendonForceLengthCurve: strain_at_one_norm_force=1
    Millard12EqMuscleWithAfferents l_Superior_Rectus: min_control=0 max_control=1 optimal_force=1
        max_isometric_force=1.1768 optimal_fiber_length=0.04487 tendon_slack_length=0.0054
        max_contraction_velocity=4.2009 ignore_tendon_compliance=true fiber_damping=0 default_activation=0
        default_fiber_length=0.04495 activation_time_constant=0.005 deactivation_time_constant=0.005
      PathPoint LSR-Origin-P1: skull (0.0453 0.0546 -0.018)
      PathPoint LSL-Pulley-P2: skull (0.0678 0.063 -0.032)
      PathPoint LSR-Insertion-P3: l_eye (0.0076 0.0104 0)
      PathWrap: wrap_object=left_eye_wrap method=axial
      ActiveForceLengthCurve: min_norm_active_fiber_length=0.55 transition_norm_fiber_length=0.7
          max_norm_active_fiber_length=1.8 shallow_ascending_slope=2.4 minimum_value=0
      FiberForceLengthCurve: strain_at_zero_force=-0.18 strain_at_one_norm_force=0.4
      TendonForceLengthCurve: strain_at_one_norm_force=1
    Millard12EqMuscleWithAfferents l_Inferior_Rectus: min_control=0 max_control=1 optimal_force=1
        max_isometric_force=1.4269 optimal_fiber_length=0.04549 tendon_slack_length=0.0048
        max_contraction_velocity=4.1437 ignore_tendon_compliance=true fiber_damping=0 default_activation=0
        default_fiber_length=0.0449 activation_time_constant=0.005 deactivation_time_constant=0.005
      PathPoint LIR-Origin-P1: skull (0.0453 0.0486 -0.018)
      PathPoint LIL-Pulley-P2: skull (0.0728 0.0382 -0.0298)
      PathPoint LIR-Insertion-P3: l_eye (0.00805 -0.0102 0)
      PathWrap: wrap_object=left_eye_wrap method=axial
      ActiveForceLengthCurve: min_norm_active_fiber_length=0.55 transition_norm_fiber_length=0.7
          max_norm_active_fiber_length=1.8 shallow_ascending_slope=2.4 minimum_value=0
      FiberForceLengthCurve: strain_at_zero_force=-0.18 strain_at_one_norm_force=0.4
      TendonForceLengthCurve: strain_at_one_norm_force=1
    Millard12EqMuscleWithAfferents l_Superior_Oblique: min_control=0 max_control=1 optimal_force=1
        max_isometric_force=0.6031 optimal_fiber_length=0.03956 tendon_slack_length=0.0265
        max_contraction_velocity=4.7648 ignore_tendon_compliance=true fiber_damping=0 default_activation=0
        default_fiber_length=0.06137 activation_time_constant=0.005 deactivation_time_constant=0.005
      PathPoint LIR-Origin-P1: skull (0.0461658 0.05214521 -0.0175598)
      PathPoint LSO-Pulley-P2: skull (0.0852 0.0632 -0.0188)
      PathPoint LSO-Insertion-P3: l_eye (-0.0044 0.011 -0.0029)
      PathWrap: wrap_object=left_eye_wrap2 method=axial
      ActiveForceLengthCurve: min_norm_active_fiber_length=0.55 transition_norm_fiber_length=0.7
          max_norm_active_fiber_length=1.8 shallow_ascending_slope=2.4 minimum_value=0
      FiberForceLengthCurve: strain_at_zero_force=-0.18 strain_at_one_norm_force=0.4
      TendonForceLengthCurve: strain_at_one_norm_force=1
    Millard12EqMuscleWithAfferents l_Inferior_Oblique: min_control=0 max_control=1 optimal_force=1
        max_isometric_force=0.559 optimal_fiber_length=0.0411 tendon_slack_length=0.0015
        max_contraction_velocity=4.5863 ignore_tendon_compliance=true fiber_damping=0 default_activation=0
        default_fiber_length=0.03774 activation_time_constant=0.005 deactivation_time_constant=0.005
      PathPoint LIO-Origin-P1: skull (0.0883 0.0356 -0.0229)
      PathPoint LIO-Pulley-P2: skull (0.06982 0.0375 -0.034)
      PathPoint LIO-Insertion-P3: l_eye (-0.008 0 -0.009)
      PathWrap: wrap_object=left_eye_wrap2 method=axial
      ActiveForceLengthCurve: min_norm_active_fiber_length=0.55 transition_norm_fiber_length=0.7
          max_norm_active_fiber_length=1.8 shallow_ascending_slope=2.4 minimum_value=0
      FiberForceLengthCurve: strain_at_zero_force=-0.18 strain_at_one_norm_force=0.4
      TendonForceLengthCurve: strain_at_one_norm_force=1
    SpringGeneralizedForce l_add_adb_tissue: coordinate=l_eye_add_abd
    SpringGeneralizedForce l_sup_inf_tissue: coordinate=l_eye_sup_inf
    SpringGeneralizedForce l_inc_exc_tissue: coordinate=l_eye_inc_exc
    ObjectGroup hyoid: members=(Sterno_hyoid Omo_hyoid SternoThyroid digastric_post digastric_ant Geniohyoid Mylohyoid_Post Mylohyoid_Ant Stylohyoid_Lat Stylohyoid_Med Sterno_hyoid_L Omo_hyoid_L SternoThyroid_L digastric_post_L digastric_ant_L Geniohyoid_L Mylohyoid_Post_L Mylohyoid_Ant_L Stylohyoid_Lat_L Stylohyoid_Med_L)
    ObjectGroup sterno: members=(cleid_mast cleid_occ stern_mast cleid_mast_L cleid_occ_L stern_mast_L)
    ObjectGroup flexion: members=(cleid_mast cleid_occ long_cap_sklc4 long_col_c1c5 long_col_c1thx long_col_c5thx scalenus_ant stern_mast cleid_mast_L cleid_occ_L long_cap_sklc4_L long_col_c1c5_L long_col_c1thx_L long_col_c5thx_L scalenus_ant_L stern_mast_L)
    ObjectGroup rotation_contra: members=(cleid_mast cleid_occ long_cap_sklc4 long_col_c1c5 obl_cap_sup semi_cap_sklc5 semi_cap_sklthx semi_cerv_c3thx stern_mast trap_acr trap_cl)
    ObjectGroup lat_bending: members=(cleid_mast cleid_occ iliocost_cerv_c5rib levator_scap long_cap_sklc4 long_col_c1c5 long_col_c1thx long_col_c5thx longissi_cap_sklc6 longissi_cerv_c4thx obl_cap_inf obl_cap_sup rectcap_post_maj scalenus_ant scalenus_med scalenus_post semi_cap_sklc5 semi_cap_sklthx semi_cerv_c3thx splen_cap_sklc6 splen_cap_sklthx splen_cerv_c3thx stern_mast trap_acr trap_cl)
    ObjectGroup scalenus: members=(scalenus_ant scalenus_med scalenus_post)
    ObjectGroup extension: members=(iliocost_cerv_c5rib levator_scap longissi_cap_sklc6 longissi_cerv_c4thx obl_cap_inf obl_cap_sup rectcap_post_maj rectcap_post_min scalenus_med scalenus_post semi_cap_sklc5 semi_cap_sklthx semi_cerv_c3thx splen_cap_sklc6 splen_cap_sklthx splen_cerv_c3thx trap_acr trap_cl)
    ObjectGroup rotation_ipsi: members=(iliocost_cerv_c5rib levator_scap long_col_c5thx longissi_cap_sklc6 longissi_cerv_c4thx obl_cap_inf rectcap_post_maj scalenus_med scalenus_post splen_cap_sklc6 splen_cap_sklthx splen_cerv_c3thx)
    ObjectGroup longus: members=(long_cap_sklc4 long_col_c1c5 long_col_c1thx long_col_c5thx)
    ObjectGroup trapezius: members=(trap_acr trap_cl)
    ObjectGroup splenius: members=(splen_cap_sklc6 splen_cap_sklthx splen_cerv_c3thx)
    ObjectGroup semispinalis: members=(semi_cap_sklc5 semi_cap_sklthx semi_cerv_c3thx)
    ObjectGroup levator_scap: members=levator_scap
    ObjectGroup erectorspinae: members=(iliocost_cerv_c5rib longissi_cap_sklc6 longissi_cerv_c4thx)
    ObjectGroup suboccipital: members=(obl_cap_inf obl_cap_sup rectcap_post_maj rectcap_post_min)
    ObjectGroup multifidus
  MarkerSet:
    Marker SJN: ribcage (0.02 0.351569 0)
    Marker RAH: skull (0.1 0.1 0.05)
    Marker LAH: skull (0.1 0.1 -0.06)
    Marker RPH: skull (-0.09 0.1 0.045)
    Marker LPH: skull (-0.09 0.1 -0.045)
    Marker RCAJ: rscapula (0 0.01 0.02)
    Marker LCAJ: lscapula (0 0.01 -0.02)
    Marker r_eye_marker: r_eye (0.3 0 0)
    Marker l_eye_marker: l_eye (0.3 0 0)
